# ============================================================
# Sample LAMMPS input for MOF-808 simulations with MBX
#
# The MOF framework uses QeQ charges obtained with the Ongari
# scheme. Optional settings for H2O, CO2, and alternative
# simulation ensembles are included below and can be enabled
# as needed.
# ============================================================


# ============================================================
# Variable definitions
# ============================================================

variable        temp index 100.15      # simulation temperature (K)
variable        dt equal 0.5           # timestep (fs)
variable        pressure equal 1.0


# ============================================================
# Basic simulation settings
# ============================================================

processors      * * * map xyz

units           real
atom_style      full
boundary        p p p

box             tilt large

read_data       mof808_empty.data


# ============================================================
# Groups and molecular definitions
# ============================================================

group           mof type 1 2 3 4 5 6 7 8 9 10 11

# Optional groups
#group          li type 12
#group          h2o type 12 13
#group          co2 type 9 10


# ============================================================
# Bonded interactions
# ============================================================

bond_style      harmonic
angle_style     harmonic
dihedral_style  harmonic
improper_style  cvff


# ----------------------------
# MOF
# ----------------------------

include         coefficients


# ----------------------------
# H2O
# ----------------------------

#set             type 3 charge -1.1128
#set             type 4 charge  0.5564

#bond_coeff      12 0.0 0.0
#angle_coeff     23 0.0 0.0


# ----------------------------
# CO2
# ----------------------------

#bond_coeff      9  0.0 0.0
#angle_coeff     16 0.0 0.0


# ============================================================
# Nonbonded interactions
# ============================================================

# Alternative nonbonded style without MBX
#pair_style      lj/cut/coul/long 20.0

pair_style      hybrid/overlay mbx 9.0 lj/cut 9.0 coul/exclude 9.0
pair_modify     tail yes


# ----------------------------
# MOF pair coefficients
# ----------------------------

include         PAIR_COEFFICIENTS_EMPTY_MOF


# ----------------------------
# MBX interactions
# ----------------------------

# MBX-water
#pair_coeff      12      12 mbx  0.0 0.0
#pair_coeff      12      13 mbx  0.0 0.0
#pair_coeff      13      13 mbx  0.0 0.0

# Alternative generic MBX definition
#pair_coeff      * * mbx  0.0 0.0

# Current MBX setup for the MOF framework
pair_coeff      * * mbx 1 dp1 1*11 json mbx.json


# ----------------------------
# MBX-CO2
# ----------------------------

#pair_coeff      9      9 mbx  0.0 0.0
#pair_coeff      9     10 mbx  0.0 0.0
#pair_coeff      10    10 mbx  0.0 0.0


# ----------------------------
# MBX water-CO2
# ----------------------------

#pair_coeff      7      9 mbx  0.0 0.0
#pair_coeff      7      10 mbx  0.0 0.0
#pair_coeff      8      9 mbx  0.0 0.0
#pair_coeff      8      10 mbx  0.0 0.0


# ----------------------------
# Coulomb exclusions
# ----------------------------

pair_coeff      1*11 1*11 coul/exclude


# ----------------------------
# Optional long-range electrostatics
# ----------------------------

#kspace_style    ewald 0.000001
#kspace_style    pppm/tip4p 1.0e-5

special_bonds   amber


# ============================================================
# Neighbor settings
# ============================================================

neighbor        2.0 bin
neigh_modify    every 1 delay 1 check yes


# ============================================================
# Timestep and MBX energy components
# ============================================================

timestep        ${dt}

compute         mbx all pair mbx

variable        e1    equal c_mbx[1]
variable        e2    equal c_mbx[2]
variable        e3    equal c_mbx[3]
variable        ebuck equal c_mbx[4]
variable        edisp equal c_mbx[5]
variable        eele  equal c_mbx[6]
variable        etot  equal c_mbx[7]


# ============================================================
# Thermodynamic output
# ============================================================

#thermo_style    custom step time temp cella cellb cellc vol pe ke etotal
thermo_style    custom step time temp cella cellb cellc evdwl ecoul epair ebond eangle edihed eimp emol elong etail v_e1 v_e2 v_e3 v_ebuck v_edisp v_eele v_etot pe etotal xlo xhi ylo yhi zlo zhi xy xz yz vol

thermo          10
thermo_modify   flush yes


# ============================================================
# Ensemble settings
# ============================================================

# ----------------------------
# NVT
# ----------------------------

#fix             mynvt all nvt temp ${temp} ${temp} $(100.0*dt) tchain 4

fix             nvt all nvt temp 300.0 300.0 1.0


# ----------------------------
# NPT
# ----------------------------

#fix             mynpt all npt temp ${temp} ${temp} $(100.0*dt) iso ${pressure} ${pressure} $(1000.0*dt) tchain 4

#fix             3 all npt temp 298.15 298.15 $(250.0*dt) iso 1.0 1.0 $(1000.0*dt)

#fix             4 mof npt temp 298.15 298.15 $(250.0*dt) iso 1.0 1.0 $(1000.0*dt)

#fix             3 all npt temp 298.15 298.15 $(10.0*dt) iso 1.0 1.0 $(100.0*dt)


# ----------------------------
# NVE
# ----------------------------

#fix             nve all nve


# ============================================================
# Optional velocity initialization
# ============================================================

#velocity        all create ${temp} 428879 rot yes dist gaussian
#velocity        all zero linear
#velocity        all zero angular


# ============================================================
# Trajectory and restart output
# ============================================================

dump            1 all custom 10 traj.lammpstrj id type x y z
dump_modify     1 sort id

restart         5000 restart.inter.1 restart.inter.2


# ============================================================
# Run
# ============================================================

run             200000


# ============================================================
# Final output
# ============================================================

write_data      final.data nocoeff
write_restart   restart.inter
